Simulations: Version=168
  DataStore
  Experiment pd
    Factors
      Permutation
        Factor Ideotype
          Specification=[SowingRule].Script.CultivarName = DT1, DT2, DPHY9, DPHY15, HY5, HY6
        Factor SowDate
          Specification=[SowingRule].Script.SowDate =01-Nov, 15-Nov, 01-Dec, 15-Dec, 01-Jan, 15-jan, 01-Feb, 15-Feb
    Simulation Base_one
      Clock: Start=2020-10-01; End=2021-12-01
      Summary
      Weather: FileName=D:/Zimbabwe/project/wth_loc_2.met
      SoilArbitrator
      Zone Paddock: Area=1; Slope=0; AspectAngle=0; Altitude=50
        Report HarvestReport: EventNames=[Sorghum].Harvesting
          VariableNames:
            [Clock].Today
            [Sorghum].SowingDate
            ([Sorghum].Grain.Wt /100) as FinalYield_kg_Ha
            ([Sorghum].AboveGround.Wt * 10000 / 1000) as FinalBiomass_kg_Ha
            [Sorghum].Leaf.LAI
            Sum of [sorghum].Phenology.ThermalTime from [Sorghum].Sowing to [Sorghum].Harvesting as CropDuration
            [sorghum].Phenology.MaturityDAS
            [Sorghum].Leaf.FinalLeafNo
            ([Sorghum].Leaf.CoverGreen * 100) as StayGreen
            ([Sorghum].Stem.Wt * 10000 / 1000000) as StemWt
            Sum of [Weather].Rain from [Sorghum].Sowing to [Sorghum].Harvesting as Rain
            Sum of [Soil].soilWater.Eo from [Sorghum].Sowing to [Sorghum].Harvesting as InCropET
            ([Sorghum].Grain.Wt * 10) / InCropET as WUE
        Folder Manager folder
          Manager Harvesting
            Crop = [Sorghum]
```csharp
using APSIM.Shared.Utilities;
using Models.Utilities;
using Models.Soils;
using Models.PMF;
using Models.Core;
using System;

namespace Models
{
    [Serializable] 
    public class Script : Model
    {
        [Description("Crop")]
        public IPlant Crop { get; set; }
        
        [EventSubscribe("DoManagement")]
        private void OnDoManagement(object sender, EventArgs e)
        {
            if (Crop.IsReadyForHarvesting)
            {
                Crop.Harvest();
                Crop.EndCrop();
            }
        }
    }
}
```
          Manager Reset on sowing
            ResetWater = Yes
            ResetNutrients = Yes
            ResetSOM = Yes
```csharp
using Models.Soils.Nutrients;
using APSIM.Shared.Utilities;
using Models.Surface;
using Models.Utilities;
using Models.Soils.Nutrients;
using Models.Soils;
using Models.PMF;
using Models.Core;
using System;
using System.Linq;
using Models.Interfaces;

namespace Models
{
    [Serializable]
    public class Script : Model
    {
        [Link] private Plant Wheat;
        [Link] private ISoilWater SoilWater;
        [Link] private Nutrient nutrient;
        [Link] private SurfaceOrganicMatter SOM;
        [Link] private Summary Summary;

        [Description("Reset Water? (Yes or No)")]
        public string ResetWater {get;set;}

        [Description("Reset Soil Nutrients? (Yes or No)")]
        public string ResetNutrients {get;set;}

        [Description("Reset Surface Organic Matter? (Yes or No)")]
        public string ResetSOM {get;set;}

        [EventSubscribe("Sowing")]
        private void OnSowing(object sender, EventArgs e)
        {
            if (ResetWater == "Yes")
            {
                Summary.WriteMessage(this, "Reset Water", MessageType.Diagnostic);
                SoilWater.Reset();
            }
            if (ResetNutrients == "Yes")
            {
                Summary.WriteMessage(this, "Reset Nutrients", MessageType.Diagnostic);
                nutrient.Reset();
            }
            if (ResetSOM == "Yes")
            {
                Summary.WriteMessage(this, "Reset Surface OM", MessageType.Diagnostic);
                SOM.Reset();
            }
        }
    }
}
```
          Manager SowingRule
            Crop = [Sorghum]
            SowDate = 24-Dec
            CultivarName = Amethyst
            SowingDepth = 30
            RowSpacing = 750
            Population = 5.2
```csharp
using APSIM.Shared.Utilities;
using Models.Utilities;
using Models.Soils;
using Models.PMF;
using Models.Core;
using System;
using System.Linq;

namespace Models
{
    [Serializable]
    public class Script : Model
    {
        [Link] Clock Clock;
        [Link] Fertiliser Fertiliser;
        [Link] Summary Summary;
        [Link] Soil Soil;
        
        [Description("Crop")]
        public IPlant Crop { get; set; }

        [Description("Sowing date (d-mmm)")]
        public string SowDate { get; set; }

        [Display(Type = DisplayType.CultivarName)]
        [Description("Cultivar to be sown")]
        public string CultivarName { get; set; }

        [Description("Sowing depth (mm)")]
        public double SowingDepth { get; set; }

        [Description("Row spacing (mm)")]
        public double RowSpacing { get; set; }

        [Description("Plant population (/m2)")]
        public double Population { get; set; }

        [EventSubscribe("DoManagement")]
        private void OnDoManagement(object sender, EventArgs e)
        {
            if (DateUtilities.WithinDates(SowDate, Clock.Today, SowDate))
            {
                Crop.Sow(population: Population, cultivar: CultivarName, depth: SowingDepth, rowSpacing: RowSpacing);    
            }
        }
    }
}
```
          Manager Fertilise at sowing
            Crop = [Sorghum]
            FertiliserType = UreaN
            Amount = 40
```csharp
using Models.Soils;
using System;
using System.Linq;
using Models.Core;
using Models.PMF;
namespace Models
{
    [Serializable]
    public class Script : Model
    {
        [Link] Clock Clock;
        [Link] Fertiliser Fertiliser;
        
        [Description("Crop to be fertilised")]
        public IPlant Crop { get; set; }

        [Description("Type of fertiliser to apply? ")] 
        public Fertiliser.Types FertiliserType { get; set; }
    
        [Description("Amount of fertiliser to be applied (kg/ha)")]
        public double Amount { get; set; }
        
        [EventSubscribe("Sowing")]
        private void OnSowing(object sender, EventArgs e)
        {
            Model crop = sender as Model;
            if (Crop != null && crop.Name.ToLower() == (Crop as IModel).Name.ToLower())
                Fertiliser.Apply(Amount: Amount, Type: FertiliserType);
        }
    }
}
```
          Manager Fertilise topup
            FertiliserType = UreaN
            Threshold = 120
```csharp
using Models.Soils;
using APSIM.Shared.Utilities;
using Models.Soils.Nutrients;
using Models.PMF;
using Models.Core;
using System;
using System.Linq;
using Models.Soils.Nutrients;
namespace Models
{
    [Serializable]
    public class Script : Model
    {
        [Link] Clock Clock;
        [Link] Fertiliser Fertiliser;
        [Link(ByName=true)] Solute NO3;

        [Description("Type of fertiliser to apply? ")] 
        public Fertiliser.Types FertiliserType { get; set; }
    
        [Description("Threshold amount of NO3 to topup to (kg/ha)")]
        public double Threshold { get; set;}
        
        [EventSubscribe("DoManagement")]
        private void OnDoManagement(object sender, EventArgs e)
        {
            double Amount = Threshold - MathUtilities.Sum(NO3.kgha);
            Fertiliser.Apply(Amount: Amount, Type: FertiliserType);
        }
    }
}
```
        Fertiliser
        MicroClimate: a_interception=0; b_interception=1; c_interception=0; d_interception=0; SoilHeatFluxFraction=0.4; MinimumHeightDiffForNewLayer=0; NightInterceptionFraction=0.5; ReferenceHeight=2
        Plant Sorghum
          Cultivar DT1
            Command:
              [Phenology].TTEndJuvToInit.FixedValue = 100
              [Leaf].Parameters.aMaxIntercept.FixedValue = -321.13
              [Leaf].Parameters.aMaxSlope.FixedValue = 46.312
              [Leaf].Parameters.aX0.FixedValue = 0.786
              [Phenology].TTFlowerToMaturity.FixedValue = 761
              [Leaf].Parameters.leafInitRate.FixedValue = 17.7
              [Grain].DMPerSeed.FixedValue = 0.000415
              [Grain].PotGrainFillRate.MaxGrainFillRate.FixedValue = 0.05
          Cultivar DT2
            Command:
              [Phenology].TTEndJuvToInit.FixedValue = 100
              [Leaf].Parameters.aMaxIntercept.FixedValue = -321.13
              [Leaf].Parameters.aMaxSlope.FixedValue = 46.312
              [Leaf].Parameters.aX0.FixedValue = 0.786
              [Phenology].TTFlowerToMaturity.FixedValue = 761
              [Leaf].Parameters.leafInitRate.FixedValue = 17.7
              [Grain].DMPerSeed.FixedValue = 0.000415
              [Grain].PotGrainFillRate.MaxGrainFillRate.FixedValue = 0.06
          Cultivar DPHY9
            Command:
              [Phenology].TTEndJuvToInit.FixedValue = 100
              [Leaf].Parameters.aMaxIntercept.FixedValue = -321.13
              [Leaf].Parameters.aMaxSlope.FixedValue = 46.312
              [Leaf].Parameters.aX0.FixedValue = 0.786
              [Phenology].TTFlowerToMaturity.FixedValue = 951.25
              [Leaf].Parameters.leafInitRate.FixedValue = 11.8
              [Grain].DMPerSeed.FixedValue = 0.00083
              [Grain].PotGrainFillRate.MaxGrainFillRate.FixedValue = 0.06
          Cultivar DPHY15
            Command:
              [Phenology].TTEndJuvToInit.FixedValue = 100
              [Leaf].Parameters.aMaxIntercept.FixedValue = -321.13
              [Leaf].Parameters.aMaxSlope.FixedValue = 46.312
              [Leaf].Parameters.aX0.FixedValue = 0.786
              [Phenology].TTFlowerToMaturity.FixedValue = 1141.5
              [Leaf].Parameters.leafInitRate.FixedValue = 11.8
              [Grain].DMPerSeed.FixedValue = 0.00083
              [Grain].PotGrainFillRate.MaxGrainFillRate.FixedValue = 0.04
          Cultivar HY5
            Command:
              [Phenology].TTEndJuvToInit.FixedValue = 100
              [Leaf].Parameters.aMaxIntercept.FixedValue = -321.13
              [Leaf].Parameters.aMaxSlope.FixedValue = 46.312
              [Leaf].Parameters.aX0.FixedValue = 0.786
              [Phenology].TTFlowerToMaturity.FixedValue = 1141.5
              [Leaf].Parameters.leafInitRate.FixedValue = 17.7
              [Grain].DMPerSeed.FixedValue = 0.000415
              [Grain].PotGrainFillRate.MaxGrainFillRate.FixedValue = 0.02
          Cultivar HY6
            Command:
              [Phenology].TTEndJuvToInit.FixedValue = 100
              [Leaf].Parameters.aMaxIntercept.FixedValue = -321.13
              [Leaf].Parameters.aMaxSlope.FixedValue = 46.312
              [Leaf].Parameters.aX0.FixedValue = 0.786
              [Phenology].TTFlowerToMaturity.FixedValue = 1141.5
              [Leaf].Parameters.leafInitRate.FixedValue = 17.7
              [Grain].DMPerSeed.FixedValue = 0.000623
              [Grain].PotGrainFillRate.MaxGrainFillRate.FixedValue = 0.03
        SurfaceOrganicMatter: InitialResidueName=wheat_stubble; InitialResidueType=wheat; InitialResidueMass=0; InitialStandingFraction=0; InitialCPR=0; InitialCNR=80
        Soil SoilType =  clay loam: SoilType=SoilType =  clay loam; State=Auvergne-Rhône-Alpes; Country=France; ApsoilNumber=0; Latitude=45.8; Longitude=3.1
          DataSource=Original source is www.isric.org. See: https://www.isric.org/explore/soilgrids/faq-soilgrids  2023-09-21 11:43:55
          Comments=resolution = 250m - taxonomic classification name = clay loam - drainage class = NA - elevation = NA - slope = NA - geomdesc = NA
          Physical
            Thickness  ParticleSizeClay  ParticleSizeSand  ParticleSizeSilt  BD    AirDry    LL15      DUL       SAT       KS
            50         34.3              31.3              34.4              1.26  0.10341   0.20682   0.340464  0.433669  213.042
            100        35.6              29.8              34.6              1.32  0.213795  0.213795  0.348772  0.438066  187.307
            150        35.6              29.8              34.6              1.37  0.213502  0.213502  0.348671  0.437721  185.97
            300        35.6              30                34.4              1.46  0.213362  0.213362  0.348352  0.437319  185.442
            400        37                29.5              33.5              1.48  0.221365  0.221365  0.355925  0.441554  164.523
            1000       36.4              31                32.6              1.5   0.217837  0.217837  0.350971  0.438049  172.883
            SoilCrop MaizeSoil
              LL=[0.20682, 0.213795, 0.213502, 0.213362, 0.221365, 0.217837]
              KL=[0.06, 0.0491238, 0.0402192, 0.0329287, 0.0269597, 0.0220728]
              XF=[1, 1, 1, 1, 1, 1]
            SoilCrop SoybeanSoil
              LL=[0.20682, 0.213795, 0.213502, 0.213362, 0.221365, 0.217837]
              KL=[0.06, 0.0491238, 0.0402192, 0.0329287, 0.0269597, 0.0220728]
              XF=[1, 1, 1, 1, 1, 1]
            SoilCrop WheatSoil
              LL=[0.150553, 0.167927, 0.169644, 0.188735, 0.195275, 0.194103]
              KL=[0.06, 0.0491238, 0.0402192, 0.0329287, 0.0269597, 0.0220728]
              XF=[1, 1, 1, 1, 1, 1]
          WaterBalance SoilWater: SummerDate=1-Nov; SummerU=1.5; SummerCona=6.5; WinterDate=1-Apr; WinterU=1.5; WinterCona=6.5; DiffusConst=40; DiffusSlope=16; Salb=0.13; CN2Bare=73; CNRed=20; CNCov=0.8; PSIDul=-100; Thickness=[50, 100, 150, 300, 400, 1000]; SWCON=[0.4, 0.4, 0.4, 0.4, 0.4, 0.4]
          Nutrient
          Organic: FOMCNRatio=50; CarbonUnits=Total
            Thickness  Carbon  SoilCNRatio  FBiom      FInert    FOM
            50         4.72    12           0.04       0.8       150
            100        2.68    12           0.0327492  0.80804   122.81
            150        1.62    12           0.0268128  0.816161  100.548
            300        1.11    12           0.0219525  0.824364  82.3217
            400        0.78    12           0.0179732  0.832649  67.3993
            1000       0.52    12           0.0147152  0.841017  55.1819
          Chemical: Thickness=[50, 100, 150, 300, 400, 1000]; PH=[6.6, 6.7, 6.7, 6.8, 6.9, 7.1]; PHUnits=Water
          Water: Thickness=[100, 100, 200, 200, 200, 200, 200, 200, 200, 200]; InitialPAWmm=225.53; RelativeTo=LL15; FilledFromTop=false
            InitialValues=[0.323, 0.323, 0.359, 0.365, 0.349, 0.352, 0.3525, 0.33, 0.32, 0.33]
          CERESSoilTemperature Temperature
          Solute NO3: Thickness=[100, 100, 200, 200, 200, 200, 200, 200, 200, 200]; InitialValuesUnits=ppm; WaterTableConcentration=0; D0=0; DepthConstant=0; MaxDepthSoluteAccessible=0; RunoffEffectivenessAtMovingSolute=0; MaxEffectiveRunoff=0
            InitialValues=[10.4, 1.633, 1.233, 0.9, 1.1, 1.467, 3.633, 5.667, 5.8, 7.267]
          Solute NH4: Thickness=[100, 100, 200, 200, 200, 200, 200, 200, 200, 200]; InitialValues=[0.1, 0.1, 0.1, 0.1, 0.1, 0.1, 0.1, 0.1, 0.1, 0.1]; InitialValuesUnits=ppm; WaterTableConcentration=0; D0=0; DepthConstant=0; MaxDepthSoluteAccessible=0; RunoffEffectivenessAtMovingSolute=0; MaxEffectiveRunoff=0
          Solute Urea: Thickness=[100, 100, 200, 200, 200, 200, 200, 200, 200, 200]; InitialValues=[0, 0, 0, 0, 0, 0, 0, 0, 0, 0]; InitialValuesUnits=kg/ha; WaterTableConcentration=0; D0=0; DepthConstant=0; MaxDepthSoluteAccessible=0; RunoffEffectivenessAtMovingSolute=0; MaxEffectiveRunoff=0
    Simulation Base_two
      Clock: Start=1995-01-01; End=2023-05-01
      Summary
      Weather: FileName=Ukulinga93_23.met
      SoilArbitrator
      Zone Paddock: Area=1; Slope=0; AspectAngle=0; Altitude=50
        Report HarvestReport: EventNames=[Sorghum].Harvesting
          VariableNames:
            [Clock].Today
            [Sorghum].SowingDate
            ([Sorghum].Grain.Wt /100) as FinalYield_kg_Ha
            ([Sorghum].AboveGround.Wt * 10000 / 1000) as FinalBiomass_kg_Ha
            [Sorghum].Leaf.LAI
            Sum of [sorghum].Phenology.ThermalTime from [Sorghum].Sowing to [Sorghum].Harvesting as CropDuration
            [sorghum].Phenology.MaturityDAS
            [Sorghum].Leaf.FinalLeafNo
            ([Sorghum].Leaf.CoverGreen * 100) as StayGreen
            ([Sorghum].Stem.Wt * 10000 / 1000000) as StemWt
            Sum of [Weather].Rain from [Sorghum].Sowing to [Sorghum].Harvesting as Rain
            Sum of [HRS].soilWater.Eo from [Sorghum].Sowing to [Sorghum].Harvesting as InCropET
            ([Sorghum].Grain.Wt * 10) / InCropET as WUE
        Folder Manager folder: same as pd.Base_one.Paddock.Manager folder
        Fertiliser
        MicroClimate: a_interception=0; b_interception=1; c_interception=0; d_interception=0; SoilHeatFluxFraction=0.4; MinimumHeightDiffForNewLayer=0; NightInterceptionFraction=0.5; ReferenceHeight=2
        Plant Sorghum: same as pd.Base_one.Paddock.Sorghum
        SurfaceOrganicMatter: InitialResidueName=wheat_stubble; InitialResidueType=wheat; InitialResidueMass=0; InitialStandingFraction=0; InitialCPR=0; InitialCNR=80
        Soil HRS: SoilType=HMM; Site=HRS; NearestTown=Unknown; Region=SE Queensland; NaturalVegetation=Unknown; Latitude=0; Longitude=0
          Physical
            Thickness  BD    AirDry  LL15   DUL   SAT
            100        1.34  0.08    0.226  0.42  0.45
            100        1.34  0.19    0.226  0.42  0.45
            200        1.33  0.23    0.258  0.46  0.48
            200        1.38  0.26    0.27   0.46  0.47
            200        1.4   0.26    0.268  0.43  0.45
            200        1.55  0.28    0.304  0.4   0.41
            200        1.59  0.25    0.335  0.37  0.38
            200        1.63  0.28    0.33   0.33  0.37
            200        1.66  0.3     0.32   0.32  0.37
            200        1.68  0.31    0.33   0.33  0.36
            SoilCrop SorghumSoil
              LL=[0.226, 0.226, 0.258, 0.27, 0.268, 0.304, 0.335, 0.33, 0.32, 0.33]
              KL=[0.07, 0.07, 0.07, 0.07, 0.06, 0.06, 0.06, 0.05, 0.05, 0.04]
              XF=[1, 1, 1, 1, 1, 1, 1, 1, 1, 1]
          WaterBalance SoilWater: SummerDate=1-Nov; SummerU=1.5; SummerCona=6.5; WinterDate=1-Apr; WinterU=1.5; WinterCona=6.5; DiffusConst=40; DiffusSlope=16; Salb=0.2; CN2Bare=85; CNRed=20; CNCov=0.8; PSIDul=-100; Thickness=[100, 100, 200, 200, 200, 200, 200, 200, 200, 200]; SWCON=[0.3, 0.3, 0.3, 0.3, 0.3, 0.3, 0.3, 0.3, 0.3, 0.3]
          Nutrient
          Organic: FOMCNRatio=50; CarbonUnits=Total
            Thickness  Carbon  SoilCNRatio  FBiom  FInert  FOM
            100        1.19    12.5         0.05   0.45    260.587
            100        0.59    12.5         0.02   0.6     220.582
            200        0.45    12.5         0.01   0.75    158.054
            200        0.3     12.5         0.01   0.9     113.251
            200        0.2     12.5         0.01   0.9     81.1478
            200        0.16    12.5         0.01   0.9     58.1449
            200        0.17    12.5         0.01   0.9     41.6626
            200        0.17    12.5         0.05   0.9     29.8526
            200        0.17    12.5         0.02   0.9     21.3903
            200        0.17    12.5         0.01   0.9     15.3268
          Chemical: Thickness=[100, 100, 200, 200, 200, 200, 200, 200, 200, 200]; PH=[6.3, 6.4, 6.5, 6.6, 6.6, 6.5, 6.5, 6.5, 6.5, 6.5]; PHUnits=Water
          Water: Thickness=[100, 100, 200, 200, 200, 200, 200, 200, 200, 200]; InitialPAWmm=87.9; RelativeTo=LL15; FilledFromTop=false
            InitialValues=[0.323, 0.323, 0.359, 0.365, 0.349, 0.352, 0.3525, 0.33, 0.32, 0.33]
          CERESSoilTemperature Temperature
          Solute NO3: same as pd.Base_one.Paddock.SoilType =  clay loam.NO3
          Solute NH4: same as pd.Base_one.Paddock.SoilType =  clay loam.NH4
          Solute Urea: same as pd.Base_one.Paddock.SoilType =  clay loam.Urea
  Simulations: Version=162
